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/BATCH
/COM,ANSYS RELEASE 2020 R2           BUILD 20.2      UP20200601       19:59:45
RESUME,'mesh_array','db','.'
/COM,ANSYS RELEASE 2020 R2           BUILD 20.2      UP20200601       19:59:45
/PREP7
/MPLIB,STAT
eplot
CM,_Y,VOLU
VSEL, , , ,       1
CM,_Y1,VOLU
CHKMSH,'VOLU'
CMSEL,S,_Y
VSWEEP,_Y1
CMDELE,_Y
CMDELE,_Y1
CMDELE,_Y2
FINISH
/SOL
ANTYPE,2
MODOPT,LANB,15
EQSLV,SPAR
MXPAND,15, , ,1
LUMPM,0
PSTRES,0
MODOPT,LANB,15,0,0, ,OFF
MXPAND,15,0,0,1,0.001,
/STATUS,SOLU
FLST,2,8,5,ORDE,4
FITEM,2,1
FITEM,2,-4
FITEM,2,11
FITEM,2,-14
/GO
DA,P51X,ALL,
/STATUS,SOLU
SOLVE
FINISH
/SOLU
ANTYPE,8
SPOPT,PSD,15,1,0
FINISH
/POST1
FINISH
/PREP7
FINISH
/SOL
FLST,2,24,1,ORDE,23
FITEM,2,1581
FITEM,2,1583
FITEM,2,1669
FITEM,2,1671
FITEM,2,1673
FITEM,2,1675
FITEM,2,1719
FITEM,2,1721
FITEM,2,1723
FITEM,2,1725
FITEM,2,1727
FITEM,2,2153
FITEM,2,2155
FITEM,2,2157
FITEM,2,-2159
FITEM,2,2161
FITEM,2,2215
FITEM,2,2217
FITEM,2,2225
FITEM,2,2227
FITEM,2,2229
FITEM,2,2337
FITEM,2,2339
F,P51X,FZ,1,
/NOPR
*DEL,_PA1
*DIM,_PA1,ARRAY,10,1,1
*DO,_I,1,10
*SET,_PA1(_I) , 0.0
*ENDDO
*SET,_PA1(1),
CM,_PC1,NODE
NSEL,NONE
*DO,_I,1,10
*IF,_PA1(_I),GT,0,THEN
*GET,_J,SCTN,_PA1(_I),3
NSEL,A,,,_J
*ENDIF
*ENDDO
*DEL,_PA1
*SET,_I ,
*SET,_J ,
/GO
SLOAD,ALL,DELETE
/NOPR
CMSEL,S,_PC1
CMDEL,_PC1
/GO
FLST,2,3,1,ORDE,2
FITEM,2,2157
FITEM,2,-2159
FDELE,P51X,FZ
FLST,2,14,1,ORDE,14
FITEM,2,1581
FITEM,2,1583
FITEM,2,1669
FITEM,2,1671
FITEM,2,1673
FITEM,2,1675
FITEM,2,2153
FITEM,2,2155
FITEM,2,2161
FITEM,2,2225
FITEM,2,2227
FITEM,2,2229
FITEM,2,2337
FITEM,2,2339
FDELE,P51X,FZ
FLST,2,7,1,ORDE,7
FITEM,2,1719
FITEM,2,1721
FITEM,2,1723
FITEM,2,1725
FITEM,2,1727
FITEM,2,2215
FITEM,2,2217
FDELE,P51X,FZ
PSDUNIT,2,ACCG,386.4,
SED,0,0,1,,
PSDFRQ,2, ,100,200,400,1000,2000
PSDVAL,2,0.08,0.08,0.318,0.318,0.08
PFACT,2,BASE,
PSDRES,DISP,REL
PSDRES,VELO,OFF
PSDRES,ACEL,OFF
PSDRES,DISP,REL
PSDRES,VELO,OFF
PSDRES,ACEL,OFF
PSDCOM,0,15,
eplot
/STATUS,SOLU
SOLVE
FINISH
/POST1
FINISH
/POST1
SET,LIST,999
FINISH
/SOL
FLST,2,4,1,ORDE,4
FITEM,2,1874
FITEM,2,1876
FITEM,2,1949
FITEM,2,2022
F,P51X,FZ,1,
/LIG,   1,1, 1.000,   0.00000000000    ,   0.00000000000    ,   0.00000000000    ,   0.00000000000
/STATUS,SOLU
SOLVE
FINISH
/POST1
SET,LIST,999
FINISH
/SOL
FINISH
/PREP7
FINISH
/POST1
SET,LIST,999
FINISH
/SOL
RESUME,'mesh_array','db','.'
/COM,ANSYS RELEASE 2020 R2           BUILD 20.2      UP20200601       20:18:24
FINISH
/PREP7
CM,_Y,VOLU
VSEL, , , ,       1
CM,_Y1,VOLU
CHKMSH,'VOLU'
CMSEL,S,_Y
VSWEEP,_Y1
CMDELE,_Y
CMDELE,_Y1
CMDELE,_Y2
FINISH
/SOL
ANTYPE,2
MODOPT,LANB,15
EQSLV,SPAR
MXPAND,15, , ,1
LUMPM,0
PSTRES,0
MODOPT,LANB,15,0,0, ,OFF
FLST,2,8,5,ORDE,4
FITEM,2,1
FITEM,2,-4
FITEM,2,11
FITEM,2,-14
/GO
DA,P51X,ALL,
MXPAND,15,0,0,1,0.001,
/STATUS,SOLU
SOLVE
FINISH
/POST1
FINISH
/SOL
FINISH
/POST1
SET,LIST,999
FINISH
/SOL
FINISH
! /EXIT,NOSAV
/BATCH
/COM,ANSYS RELEASE 2020 R2           BUILD 20.2      UP20200601       17:07:30
RESUME,'mesh_array','db','.'
/COM,ANSYS RELEASE 2020 R2           BUILD 20.2      UP20200601       17:07:30
/PREP7
FINISH
/SOL
ANTYPE,2
MODOPT,LANB,15
EQSLV,SPAR
MXPAND,15, , ,1
LUMPM,0
PSTRES,0
MODOPT,LANB,15,0,0, ,OFF
MXPAND,15,0,0,1,0.001,
FLST,2,8,5,ORDE,4
FITEM,2,1
FITEM,2,-4
FITEM,2,11
FITEM,2,-14
/GO
DA,P51X,ALL,
/STATUS,SOLU
SOLVE
/STATUS,SOLU
SOLVE
ANTYPE,2
MODOPT,LANB,15
EQSLV,SPAR
MXPAND,15, , ,1
LUMPM,0
PSTRES,0
MODOPT,LANB,15,0,0, ,OFF
FLST,2,8,5,ORDE,4
FITEM,2,1
FITEM,2,-4
FITEM,2,11
FITEM,2,-14
/GO
DA,P51X,ALL,
/STATUS,SOLU
SOLVE
RESUME,'mesh_array','db','.'
/COM,ANSYS RELEASE 2020 R2           BUILD 20.2      UP20200601       17:12:46
ANTYPE,2
MODOPT,LANB,15
EQSLV,SPAR
MXPAND,15, , ,1
LUMPM,0
PSTRES,0
MODOPT,LANB,15,0,0, ,OFF
FINISH
/PREP7
CM,_Y,VOLU
VSEL, , , ,       1
CM,_Y1,VOLU
CHKMSH,'VOLU'
CMSEL,S,_Y
VSWEEP,_Y1
CMDELE,_Y
CMDELE,_Y1
CMDELE,_Y2
FINISH
/SOL
FLST,2,8,5,ORDE,4
FITEM,2,1
FITEM,2,-4
FITEM,2,11
FITEM,2,-14
/GO
DA,P51X,ALL,
/STATUS,SOLU
SOLVE
FINISH
/POST1
SET,LIST,999
SET,LIST,999
RESUME,'mesh_array','db','.'
/COM,ANSYS RELEASE 2020 R2           BUILD 20.2      UP20200601       17:14:25
FINISH
/SOL
FINISH
/PREP7
CM,_Y,VOLU
VSEL, , , ,       1
CM,_Y1,VOLU
CHKMSH,'VOLU'
CMSEL,S,_Y
VSWEEP,_Y1
CMDELE,_Y
CMDELE,_Y1
CMDELE,_Y2
FINISH
/SOL
ANTYPE,2
MODOPT,LANB,15
EQSLV,SPAR
MXPAND,15, , ,1
LUMPM,0
PSTRES,0
MODOPT,LANB,15,0,0, ,OFF
MXPAND,15,0,0,1,0.001,
FLST,2,4,1,ORDE,4
FITEM,2,1874
FITEM,2,1876
FITEM,2,1949
FITEM,2,2022
/GO
D,P51X, , , , , ,ALL, , , , ,
/STATUS,SOLU
SOLVE
FINISH
/POST1
SET,LIST,999
RESUME,'mesh_array','db','.'
/COM,ANSYS RELEASE 2020 R2           BUILD 20.2      UP20200601       17:16:20
FINISH
/PREP7
FLST,2,1,6,ORDE,1
FITEM,2,1
FLST,2,1,6,ORDE,1
FITEM,2,1
VLSCAL,P51X, , ,1000,1000,1000, ,0,1
CM,_Y,VOLU
VSEL, , , ,       1
CM,_Y1,VOLU
CHKMSH,'VOLU'
CMSEL,S,_Y
VSWEEP,_Y1
CMDELE,_Y
CMDELE,_Y1
CMDELE,_Y2
FINISH
/SOL
ANTYPE,2
MODOPT,LANB,15
EQSLV,SPAR
MXPAND,15, , ,1
LUMPM,0
PSTRES,0
MODOPT,LANB,15,0,0, ,OFF
MXPAND,15,0,0,1,0.001,
FLST,2,8,5,ORDE,4
FITEM,2,1
FITEM,2,-4
FITEM,2,11
FITEM,2,-14
/GO
DA,P51X,ALL,
/STATUS,SOLU
SOLVE
FINISH
/POST1
SET,LIST,999
PRETAB,
SET,LIST,999
SET,LIST
SET,LIST,999
*VGET,model,ELEM,15,ETAB, , , ,2
FINISH
/SOL
ANTYPE,8
SPOPT,PSD,15,1,0
FLST,2,384,1,ORDE,10
FITEM,2,1429
FITEM,2,-1448
FITEM,2,1509
FITEM,2,-1656
FITEM,2,1949
FITEM,2,-2116
FITEM,2,2177
FITEM,2,-2200
FITEM,2,2269
FITEM,2,-2292
F,P51X,FZ,1,
PSDUNIT,2,ACCG,386.4,
SED,0,0,1,,
PSDFRQ,2, ,100,200,400,1000,2000
PSDVAL,2,0.08,0.08,0.318,0.318,0.08
PFACT,2,BASE,
PSDRES,DISP,REL
PSDRES,VELO,OFF
PSDRES,ACEL,OFF
PSDCOM,0,15,
eplot
/STATUS,SOLU
SOLVE
FINISH
/POST26
FILE,'mesh_array','rst','.'
NUMVAR,200
SOLU,191,NCMIT
STORE,MERGE
FILLDATA,191,,,,1,1
REALVAR,191,191
STORE,PSD,2,
NSOL,2,1477,U,X,
RPSD,3,2,,1,2,
NUMVAR,200
FILLDATA,191,,,,1,1
REALVAR,191,191
FILLDATA,191,,,,1,1
REALVAR,191,191
XVAR,1
PLVAR,3,
XVAR,1
PLVAR,2,
RPSD,3,2,,1,2,
NUMVAR,200
FILLDATA,191,,,,1,1
REALVAR,191,191
eplot
NSOL,4,1464,U,Z,
RPSD,5,4,,1,2,
NUMVAR,200
FILLDATA,191,,,,1,1
REALVAR,191,191
NSOL,6,1559,U,Z,
RPSD,7,6,,1,2,
NUMVAR,200
FILLDATA,191,,,,1,1
REALVAR,191,191
STORE,PSD,2,
NUMVAR,200
FILLDATA,191,,,,1,1
REALVAR,191,191
FILLDATA,191,,,,1,1
REALVAR,191,191
SAVE
FINISH
! /EXIT,NOSAV
/BATCH
/COM,ANSYS RELEASE 2020 R2           BUILD 20.2      UP20200601       19:28:22
RESUME,'mesh_array','db','.'
/COM,ANSYS RELEASE 2020 R2           BUILD 20.2      UP20200601       19:28:22
/POST26
FILE,'mesh_array','rst','.'
NUMVAR,200
SOLU,191,NCMIT
STORE,MERGE
FILLDATA,191,,,,1,1
REALVAR,191,191
STORE,PSD,2,
NSOL,2,1492,U,Z,
RPSD,3,2,,1,2,
NUMVAR,200
FILLDATA,191,,,,1,1
REALVAR,191,191
FILLDATA,191,,,,1,1
REALVAR,191,191
XVAR,1
PLVAR,2,
PLVAR,3, , , , , , , , , ,
NUMVAR,200
FILLDATA,191,,,,1,1
REALVAR,191,191
VARDEL,3
VARDEL,2
RESET
FINISH
/POST1
RESET
FINISH
/POST26
FILE,'mesh_array','rst','.'
NUMVAR,200
SOLU,191,NCMIT
STORE,MERGE
STORE,PSD,2,
STORE,PSD,1,
NUMVAR,200
FILLDATA,191,,,,1,1
REALVAR,191,191
NUMVAR,200
FILLDATA,191,,,,1,1
REALVAR,191,191
NSOL,2,1492,U,Z,
RPSD,3,2,,1,2,
NUMVAR,200
FILLDATA,191,,,,1,1
REALVAR,191,191
XVAR,1
PLVAR,2,
XVAR,1
PLVAR,3,
XVAR,1
PLVAR,2,
XVAR,1
PLVAR,1,
XVAR,1
PLVAR,2,
NUMVAR,200
FILLDATA,191,,,,1,1
REALVAR,191,191
NUMVAR,200
FILLDATA,191,,,,1,1
REALVAR,191,191
FINISH
/POST1
RESUME,'mesh_array','dbb','.'
/COM,ANSYS RELEASE 2020 R2           BUILD 20.2      UP20200601       19:43:02
FINISH
/SOL
FINISH
/PREP7
CM,_Y,VOLU
VSEL, , , ,       1
CM,_Y1,VOLU
CHKMSH,'VOLU'
CMSEL,S,_Y
VSWEEP,_Y1
CMDELE,_Y
CMDELE,_Y1
CMDELE,_Y2
FINISH
/SOL
ANTYPE,2
MODOPT,LANB,15
EQSLV,SPAR
MXPAND,15, , ,1
LUMPM,0
PSTRES,0
MODOPT,LANB,15,0,0, ,OFF
FLST,2,8,5,ORDE,4
FITEM,2,1
FITEM,2,-4
FITEM,2,11
FITEM,2,-14
/GO
DA,P51X,ALL,
MXPAND,15,0,0,1,0.001,
/STATUS,SOLU
SOLVE
FINISH
/SOLU
ANTYPE,8
SPOPT,PSD,15,1,0
/LIG,   1,1, 1.000,   0.00000000000    ,   0.00000000000    ,   0.00000000000    ,   0.00000000000
FLST,2,1,1,ORDE,1
FITEM,2,1876
D,P51X,UZ,1.0
FLST,2,1,1,ORDE,1
FITEM,2,1876
F,P51X,FZ,1,
PSDUNIT,2,ACCG,386.4,
SED,0,0,1,,
PSDFRQ,2, ,100,200,400,1000,2000
PSDVAL,2,0.08,0.08,0.318,0.318,0.08
PFACT,2,BASE,
PSDRES,DISP,REL
PSDRES,VELO,OFF
PSDRES,ACEL,OFF
PSDCOM,0,15,
/STATUS,SOLU
SOLVE
FINISH
/POST26
FILE,'mesh_array','rst','.'
NUMVAR,200
SOLU,191,NCMIT
STORE,MERGE
FILLDATA,191,,,,1,1
REALVAR,191,191
STORE,PSD,1,
NSOL,2,1876,U,Z,
RPSD,3,2,,1,2,
NUMVAR,200
FILLDATA,191,,,,1,1
REALVAR,191,191
FILLDATA,191,,,,1,1
REALVAR,191,191
XVAR,1
PLVAR,2,
NUMVAR,200
FILLDATA,191,,,,1,1
REALVAR,191,191
PRVAR,1,
FINISH
/POST26
NUMVAR,200
FILLDATA,191,,,,1,1
REALVAR,191,191
FINISH
/POST1
SET,LIST,999
SET,,, ,,, ,3
FINISH
/POST26
NUMVAR,200
FILLDATA,191,,,,1,1
REALVAR,191,191
STORE,PSD,1,
RPSD,3,2,,1,2,
NUMVAR,200
FILLDATA,191,,,,1,1
REALVAR,191,191
FILLDATA,191,,,,1,1
REALVAR,191,191
NUMVAR,200
FILLDATA,191,,,,1,1
REALVAR,191,191
RPSD,4,2,,    2,2,
RPSD,5,2,,3,2,
NUMVAR,200
FILLDATA,191,,,,1,1
REALVAR,191,191
NUMVAR,200
FILLDATA,191,,,,1,1
REALVAR,191,191
NUMVAR,200
FILLDATA,191,,,,1,1
REALVAR,191,191
XVAR,1
PLVAR,2,
NUMVAR,200
FILLDATA,191,,,,1,1
REALVAR,191,191
NUMVAR,200
FILLDATA,191,,,,1,1
REALVAR,191,191
VARDEL,5
VARDEL,4
VARDEL,3
VARDEL,2
eplot
NSOL,2,1876,U,Z,
NUMVAR,200
FILLDATA,191,,,,1,1
REALVAR,191,191
RPSD,3,2,,1,2,
NUMVAR,200
FILLDATA,191,,,,1,1
REALVAR,191,191
XVAR,1
PLVAR,3,
XVAR,1
PLVAR,2,
FINISH
/POST1
/EFACET,1
PLNSOL, U,SUM, 0,1.0
FINISH
/POST26
NUMVAR,200
FILLDATA,191,,,,1,1
REALVAR,191,191
NUMVAR,200
FILLDATA,191,,,,1,1
REALVAR,191,191
RESET
FINISH
/POST1
RESET
FINISH
/POST26
FILE,'mesh_array','rst','.'
NUMVAR,200
SOLU,191,NCMIT
STORE,MERGE
STORE,PSD,1,
RPSD,3,2,,1,2,
NUMVAR,200
FILLDATA,191,,,,1,1
REALVAR,191,191
RPSD,3,2,,1,2,
NUMVAR,200
FILLDATA,191,,,,1,1
REALVAR,191,191
NSOL,2,1876,U,Z,
NUMVAR,200
FILLDATA,191,,,,1,1
REALVAR,191,191
VARDEL,3
RPSD,3,2,,1,2,
NUMVAR,200
FILLDATA,191,,,,1,1
REALVAR,191,191
XVAR,1
PLVAR,2,
XVAR,1
PLVAR,3,
XVAR,1
PLVAR,1,
XVAR,1
PLVAR,3,
XVAR,1
PLVAR,2,
FINISH
/SOL
ANTYPE,8
FINISH
! /EXIT,NOSAV
/BATCH
/COM,ANSYS RELEASE 2020 R2           BUILD 20.2      UP20200601       23:15:38
RESUME,'mesh_array','dbb','.'
/COM,ANSYS RELEASE 2020 R2           BUILD 20.2      UP20200601       23:15:38
RESUME,'mesh_array','db','.'
/COM,ANSYS RELEASE 2020 R2           BUILD 20.2      UP20200601       23:15:41
/POST26
FILE,'mesh_array','rst','.'
NUMVAR,200
SOLU,191,NCMIT
STORE,MERGE
FILLDATA,191,,,,1,1
REALVAR,191,191
RESET
FINISH
/POST1
RESET
FINISH
/POST26
FILE,'mesh_array','rst','.'
NUMVAR,200
SOLU,191,NCMIT
STORE,MERGE
XVAR,1
PLVAR,1,
STORE,PSD,1,
NUMVAR,200
FILLDATA,191,,,,1,1
REALVAR,191,191
NUMVAR,200
FILLDATA,191,,,,1,1
REALVAR,191,191
eplot
NSOL,2,1492,U,Z,
RPSD,3,2,,1,2,
NUMVAR,200
FILLDATA,191,,,,1,1
REALVAR,191,191
XVAR,1
PLVAR,2,
XVAR,1
PLVAR,3,
RESUME,'mesh_array','dbb','.'
/COM,ANSYS RELEASE 2020 R2           BUILD 20.2      UP20200601       23:27:25
FINISH
! /EXIT,NOSAV
/BATCH
/COM,ANSYS RELEASE 2020 R2           BUILD 20.2      UP20200601       09:42:49
RESUME,'mesh_array','dbb','.'
/COM,ANSYS RELEASE 2020 R2           BUILD 20.2      UP20200601       09:42:49
/PREP7
CM,_Y,VOLU
VSEL, , , ,       1
CM,_Y1,VOLU
CHKMSH,'VOLU'
CMSEL,S,_Y
VSWEEP,_Y1
CMDELE,_Y
CMDELE,_Y1
CMDELE,_Y2
FINISH
/SOLU
ANTYPE,2
MODOPT,LANB,15
EQSLV,SPAR
MXPAND,15, , ,1
LUMPM,0
PSTRES,0
MODOPT,LANB,15,0,0, ,OFF
MXPAND,15,0,0,1,0,
FLST,2,4,1,ORDE,4
FITEM,2,1874
FITEM,2,1876
FITEM,2,1949
FITEM,2,2022
/GO
D,P51X, , , , , ,ALL, , , , ,
/STATUS,SOLU
SOLVE
FINISH
/SOLU
ANTYPE,8
SPOPT,PSD,15,1,0
PSDCOM,0,15,
PSDUNIT,2,ACCG,386.4,
SED,0,0,1,,
PSDFRQ,2, ,100,200,400,1000,2000
PSDVAL,2,0.08,0.08,0.318,0.318,0.08
FLST,2,3709,1,ORDE,2
FITEM,2,1
FITEM,2,-3709
D,P51X,UZ,1.0
FLST,2,4,1,ORDE,4
FITEM,2,1874
FITEM,2,1876
FITEM,2,1949
FITEM,2,2022
D,P51X,UZ,1.0
PFACT,2,BASE,
PSDRES,DISP,REL
PSDRES,VELO,OFF
PSDRES,ACEL,OFF
PSDCOM,0,15,
OUTPR,STAT
OUTRES,STAT
/STATUS,SOLU
SOLVE
MXPAND,15,0,0,1,0,
FINISH
/POST26
FILE,'mesh_array','rst','.'
NUMVAR,200
SOLU,191,NCMIT
STORE,MERGE
FILLDATA,191,,,,1,1
REALVAR,191,191
STORE,PSD,1,
NSOL,2,1597,U,Z,
RPSD,3,2,,1,2,
NUMVAR,200
FILLDATA,191,,,,1,1
REALVAR,191,191
FILLDATA,191,,,,1,1
REALVAR,191,191
XVAR,1
PLVAR,3,
RESUME,'mesh_array','dbb','.'
/COM,ANSYS RELEASE 2020 R2           BUILD 20.2      UP20200601       09:53:51
FINISH
/SOL
FINISH
/PREP7
FLST,2,1,6,ORDE,1
FITEM,2,1
VLSCAL,P51X, , ,1000,1000,1000, ,0,1
CM,_Y,VOLU
VSEL, , , ,       1
CM,_Y1,VOLU
CHKMSH,'VOLU'
CMSEL,S,_Y
VSWEEP,_Y1
CMDELE,_Y
CMDELE,_Y1
CMDELE,_Y2
FINISH
/SOLU
ANTYPE,2
MODOPT,LANB,15
EQSLV,SPAR
MXPAND,15, , ,1
LUMPM,0
PSTRES,0
MODOPT,LANB,15,0,0, ,OFF
FLST,2,4,1,ORDE,4
FITEM,2,1729
FITEM,2,1731
FITEM,2,1804
FITEM,2,1920
/GO
D,P51X, , , , , ,ALL, , , , ,
MXPAND,15,0,0,1,0,
/STATUS,SOLU
SOLVE
FINISH
/SOLU
ANTYPE,8
SPOPT,PSD,15,1,0
PSDUNIT,2,ACCG,386.4,
SED,0,0,1,,
PSDCOM,0,15,
ANTYPE,8
SPOPT,PSD,15,1,0
FLST,2,4,1,ORDE,4
FITEM,2,1729
FITEM,2,1731
FITEM,2,1804
FITEM,2,1877
D,P51X,UZ,1.0
RESUME,'mesh_array','dbb','.'
/COM,ANSYS RELEASE 2020 R2           BUILD 20.2      UP20200601       09:58:37
FINISH
/PREP7
FLST,2,1,6,ORDE,1
FITEM,2,1
VLSCAL,P51X, , ,1000,1000,1000, ,0,1
CM,_Y,VOLU
VSEL, , , ,       1
CM,_Y1,VOLU
CHKMSH,'VOLU'
CMSEL,S,_Y
VSWEEP,_Y1
CMDELE,_Y
CMDELE,_Y1
CMDELE,_Y2
FINISH
/SOLU
ANTYPE,2
MODOPT,LANB,15
EQSLV,SPAR
MXPAND,15, , ,1
LUMPM,0
PSTRES,0
MODOPT,LANB,15,0,0, ,OFF
/LIG,   1,1, 1.000,   0.00000000000    ,   0.00000000000    ,   0.00000000000    ,   0.00000000000
/LIG,   1,1, 1.000,   0.00000000000    ,   0.00000000000    ,   0.00000000000    ,   0.00000000000
FLST,2,4,1,ORDE,4
FITEM,2,1477
FITEM,2,1492
FITEM,2,-1493
FITEM,2,1508
/GO
D,P51X, , , , , ,ALL, , , , ,
MXPAND,15,0,0,1,0,
/STATUS,SOLU
SOLVE
FINISH
/SOLU
ANTYPE,8
SPOPT,PSD,15,1,0
FLST,2,4,1,ORDE,4
FITEM,2,1477
FITEM,2,1492
FITEM,2,-1493
FITEM,2,1508
D,P51X,UZ,1.0
PSDUNIT,2,ACCG,386.4,
SED,0,0,1,,
PSDFRQ,2, ,100,200,400,1000,2000
PSDVAL,2,0.08,0.08,0.318,0.318,0.08
PFACT,2,BASE,
PSDCOM,0,15,
PSDRES,DISP,REL
PSDRES,VELO,OFF
PSDRES,ACEL,OFF
PSDRES,DISP,REL
PSDRES,VELO,REL
PSDRES,ACEL,REL
/STATUS,SOLU
SOLVE
FINISH
/POST26
FILE,'mesh_array','rst','.'
NUMVAR,200
SOLU,191,NCMIT
STORE,MERGE
FILLDATA,191,,,,1,1
REALVAR,191,191
STORE,PSD,1,
NSOL,2,1477,U,Z,
RPSD,3,2,,1,2,
NUMVAR,200
FILLDATA,191,,,,1,1
REALVAR,191,191
FILLDATA,191,,,,1,1
REALVAR,191,191
XVAR,1
PLVAR,2,
eplot
！计算psd响应
NSOL,4,1308,U,Z,！从结果文件中选择节点数据进行存储，将节点数据分配给变量，储存的节点号，定义为XYZ三个方向的结构位移，选择Z方向的结构位移
RPSD,5,4,,1,2,  ！计算功率谱密度响应，选择一个变量存储数据，要用于计算的变量号，，0、1位移2速度3加速度，定义在psd计算中要引用的参考1绝对值2相对于基础（默认）
NUMVAR,200
FILLDATA,191,,,,1,1 ！FILLDATA, IR, LSTRT, LSTOP, LINC, VALUE, DVAL  使用斜坡函数填充变量，将数据表定义为变量IR
REALVAR,191,191
XVAR,1
PLVAR,5,
